folder simulations: version=32
  simulation Generic
    clock
      start_date = 01/01/2005  # Enter the start date of the simulation
      end_date = 31/12/2018  # Enter the end date of the simulation
    metfile met: filename=met00008.met
    summaryfile
    manager2 Script(C#)
      A = Parameter value  # Param A
```csharp
using RDotNet;

using RDotNet;
using RDotNet.Internals.Unix;
using RDotNet.NativeLibrary;
using RDotNet.Internals;
using RDotNet.Devices;
using RDotNet.Dynamic;
using RDotNet.Devices;
using RDotNet.Diagnostics;
using RDotNet.Utilities;
using System;
using System.Collections.Generic;
using System.IO;
using System.Linq;
using System.Text;
using System.Threading.Tasks;
using ModelFramework;
using System.ComponentModel;


public class Script
{
   [Link()] public Simulation MySimulation;
   public REngine engine = REngine.GetInstance();

   [Input] double day;
   [Input] double year;
   public Clock ck;

   // Customizable settings for run (1 and 0)
   double free = 1;
   double miyoshi = 1;
   double p = 0.05;
   double Rcov = 0; // 0 == R is diagonal matrix, independent observation errors

   // The following event handler will be called once at the beginning of the simulation
   [EventHandler] public void OnInitialised(){

      engine = Initialize(engine,  MySimulation, miyoshi, p, Rcov);

   }

   [EventHandler] public void OnPost(){

      // initialize some variables
      engine.Evaluate("specL <- NULL");

      // loop through paddocks to collect info from forecast
      foreach (Paddock paddock in MySimulation.ChildPaddocks) {

         object soil = paddock.LinkByType("SoilWat");
         object soiln = paddock.LinkByType("SoilN");

         ModelFramework.Component crop = paddock.Crops[0];

         // RTM function
         engine = RTM_runner(engine, crop, ((SoilWat) soil), 20);

         // gathering information on this day's forecast
         engine = date_info(engine, day, year, MySimulation.Variable("Title").ToString());

         // reading forecast from model outputs for the day
         engine = get_model_results(engine, crop, ((SoilWat) soil), ((SoilN) soiln));

      } // end collection for each paddock


      // save CSV file if simulation is over
      if(ck.is_end_simulation){

         engine.Evaluate("write.csv(data.all, file = 'dailyOutput_"+MySimulation.Variable("Title").ToString()+".csv', row.names = FALSE)");

         engine.Dispose();

         //Console.WriteLine("ck.is_end_simulation: Type is {0}", ck.is_end_simulation.GetType());

      }

   } // End onPost()

   // Function to initialize some variables for simulation and storage
   public REngine Initialize(REngine engine, Simulation MySimulation,double miyoshi,double p,double Rcov){

      engine.Evaluate("miyoshi <- " + miyoshi);
      engine.Evaluate("p <- " + p);
      engine.Evaluate("Rcov <- " + Rcov);

      ck = (Clock) MySimulation.LinkByName("clock");
      engine.Initialize(); // required since v1.5
      engine.Evaluate("library(hsdar)");
      engine.Evaluate("library(dplyr)");

      // defining variables for storage
      engine.Evaluate("data.all <- NULL;SDA.out <- list();Forecast <- list(Q=NULL);Observed <- list();Time <- list()");
      engine.Evaluate("X <- NULL;DAR <- NULL;dd <- NULL;R <- NULL;theta <- NULL");



      return engine;
   }


   // function to write adjusted values back into the model for the next forecast
   public void write_back(REngine engine, Simulation MySimulation, string[] statVars, string[] set_modules, string[] set_names,GenericVector DAResult){

      // loop over stat variables that are going to be assimilated
      for (int i = 0; i < statVars.Length; i++) {

         // read the result for the first state variables
         var tmp_res = DAResult[statVars[i]].AsDataFrame();
         engine.SetSymbol("tmp_res", tmp_res);

         // now loop over ensembles and write the adjusted variables back to the model
         for (int j = 0; j < MySimulation.ChildPaddocks.Count; j++) {

            // subset a row for each ensemble
            double[] row = engine.Evaluate("as.numeric(unlist(tmp_res[" + (j + 1) + ",])) ").AsNumeric().ToArray();

            Paddock paddock_set = MySimulation.ChildPaddocks[j];

            // set values based on their module
            if (set_modules[i] == "SoilN"){
               object soil_set1 = paddock_set.LinkByType("SoilN");
               ((SoilN) soil_set1).Set(set_names[i], row);

            }else if (set_modules[i] == "SoilWat"){
               object soil_set2 = paddock_set.LinkByType("SoilWat");
               ((SoilWat) soil_set2).Set(set_names[i], row);

            }
         }
      }
   }

   // function to collet model forecast results for the current time step
   public REngine get_model_results(REngine engine, ModelFramework.Component crop, SoilWat soilwc, SoilN soiln){

      // ------- Crop variables
      string[] out_vars = {"biomass","lai","yield", "swdef_photo"};
      foreach(string out_var in out_vars){
         double tmp_out = 0;
         crop.Get(out_var, out tmp_out);
         engine.Evaluate("dd$" + out_var + "<-" + Math.Round(tmp_out, 2));
      }

      // ------- Soil state variables
      // Loop through all the layers and collect info on all variables

      for (int i = 0; i < soilwc.dlayer.Length; i++) {

         // ------- soil temp
         engine.Evaluate("dd$st"+(i+1)+" <- " + Math.Round(soiln.st[i], 2));

         // ------- soil water
         engine.Evaluate("dd$sw"+(i+1)+" <- " + Math.Round(soilwc.sw[i], 2));

         // ------- soil no3
         engine.Evaluate("dd$no3_"+(i+1)+" <- " + Math.Round(soiln.no3[i], 2));

				 // ------- soil no3
         engine.Evaluate("dd$oc_"+(i+1)+" <- " + Math.Round(soiln.oc[i], 2));

         // ------- soil nh4
         //engine.Evaluate("dd$nh4_"+(i+1)+" <- " + Math.Round(soiln.nh4[i], 2));

         // ------- total soil N
         //engine.Evaluate("dd$ntot_"+(i+1)+" <- " + Math.Round(soiln.nit_tot[i], 2));

         // ------- N mineralization rates
         //engine.Evaluate("dd$nmin_"+(i+1)+" <- " + Math.Round(soiln.dlt_n_min_tot[i], 2));

         // ------- soil saturated conductivity
        // engine.Evaluate("dd$ks" + (i + 1) + " <- " + Math.Round(soilwc.ks[i], 2));

         // ------- soil bulk density
      //   engine.Evaluate("dd$bd" + (i + 1) + " <- " + Math.Round(soilwc.bd[i], 2));

         // ------- soil saturated water flow conductivity
        // engine.Evaluate("dd$swcon" + (i + 1) + " <- " + Math.Round(soilwc.swcon[i], 2));
      }

      engine.Evaluate("dd$drain <- " + soilwc.drain);

      // adding info to simulation storage variables
      engine.Evaluate("dd <- as.data.frame(dd)");
      engine.Evaluate("data.all <- rbind(data.all, dd)");

      return engine;
   }

   // Function that couples APSIM with RTM model
   public REngine RTM_runner(REngine engine, ModelFramework.Component crop, SoilWat soilwc, int n){

      // initialize storage variables
      double lai_tmp;
      double biomass;
      double yieldc;
      double LeafGreenNConc = 0;
      double drain = 0;
      double LeafGreenWt = 0;
      double GPLA = 0;
      double biomass_wt = 0;

      // extract variables for RTM model
      crop.Get("lai", out lai_tmp);
      crop.Get("yield", out yieldc);
      crop.Get("biomass", out biomass);
      crop.Get("LeafGreenNConc", out LeafGreenNConc);
      crop.Get("LeafGreenWt", out LeafGreenWt);
      crop.Get("TPLA", out GPLA);
      crop.Get("biomass_wt", out biomass_wt);

      // estimating values for RTM model
      engine.Evaluate("sla <-" + lai_tmp * 10 / (LeafGreenWt));

      // PROSAIL function will break if sla is Inf (aka if LeafGreenWt is 0)
      if (LeafGreenWt > 0){
         engine.Evaluate("lai_tmp <-" + lai_tmp);
         engine.Evaluate("psoil <-" + soilwc.sw[1] / soilwc.sat[1]);

         // https://www.sciencedirect.com/science/article/pii/S0303243413000469
         engine.Evaluate("cab <-" + ((LeafGreenNConc * LeafGreenWt) - 0.2057) / 10);
         engine.Evaluate("car <- cab/4.11");
         engine.Evaluate(@"n <- " + n +@"
            parameter <- data.frame(N =(0.025 + (0.9*sla))/(sla-0.1),
            LAI = " + lai_tmp + @",
            Cab=cab,
            Car=car,
            Cw=runif(n,0.01,0.03),
            Cm=(1/sla/1000),
            Cbrown=runif(n,0.01,0.99),
            hspot=runif(n,0.01,.2),
            psoil=psoil
            )");

         engine.Evaluate("spectra <- hsdar::PROSAIL(parameterList = parameter)");
         engine.Evaluate("temp <- data.frame(vegindex(spectra, index=c('NDVI','OSAVI','EVI','Green NDVI', 'MSAVI','NDVI3')))");
         engine.Evaluate(@"dd <- apply(temp, 2, mean)");
      } else{

         // here we have to add empty values so the row is the correct length
         engine.Evaluate("spectra <- NULL");
         engine.Evaluate(@"dd <- list(NDVI = 0, OSAVI = 0, EVI = 0, `Green NDVI`= 0, MSAVI = 0, NDVI3 = 0)");
      }

      engine.Evaluate("specL <- c(specL, spectra) ");
      return engine;
   }

   // Function to get information for this time step
   public REngine date_info(REngine engine, double day, double year, string name){

      NumericVector dateinfo = engine.CreateNumericVector(new double[] {day, year});
      engine.SetSymbol("dateinfo", dateinfo);
      engine.Evaluate("dd$day <-" + day);
      engine.Evaluate("dd$year <-" + year);
      engine.Evaluate("dd$sim <- getwd()");
      engine.Evaluate("dd$ensemble <- '" +name + "'");

      engine.Evaluate("Time$Day <- " + day);
      engine.Evaluate("Time$Year <-" + year);
      engine.Evaluate("today <- paste0(" + day + ",'-'," + year + ")");

      return engine;
   }

}
```
      Reference
        ref = RDotNet.dll  # Path to assembly
      Reference Reference1
        ref = RDotNet.NativeLibrary.dll  # Path to assembly
      Reference Reference2
        ref = DynamicInterop.dll  # Path to assembly
    area paddock
      soil: Site=?; Longitude=?
        Comment = ICASA Classification: Unknown  # Comments
        Latitude = ?  # Latitude (WGS84)
        DataSource = GSDE
        Water
          Layer:
            Thickness (mm)  BD (g/cc)  AirDry (mm/mm)  LL15 (mm/mm)  DUL (mm/mm)  SAT (mm/mm)
            45.0            1.28662    0.0904395       0.18          0.33         0.44
            46.0            1.38962    0.0907455       0.21          0.35         0.42
            75.0            1.39092    0.092608        0.21          0.34         0.45
            123.0           1.39092    0.092608        0.18          0.35         0.43
            204.0           1.46322    0.0963625       0.19          0.36         0.46
            336.0           1.53029    0.09582         0.18          0.36         0.44
            554.0           1.57829    0.082258        0.15          0.34         0.39
            913.0           1.57829    0.082258        0.2           0.35         0.45
          SoilCrop Maize
            Layer:
              Thickness (mm)  LL (mm/mm)  KL (/day)  XF (0-1)
              45.0            0.18        0.08       1
              46.0            0.21        0.08       1
              75.0            0.21        0.08       1
              123.0           0.18        0.08       1
              204.0           0.19        0.08       1
              336.0           0.18        0.0647333  1
              554.0           0.15        0.0478     1
              913.0           0.2         0.02       1
        SoilWat: SummerCona=3.5; SummerU=5.92335; SummerDate=1-Nov; WinterCona=3.5; WinterU=5.92335; WinterDate=1-Apr; DiffusConst=40; DiffusSlope=16; Salb=0.101916; Cn2Bare=74.6168; CnRed=20; CnCov=0.8
          Layer:
            Thickness (mm)  SWCON (0-1)
            45.0            0.3
            46.0            0.3
            75.0            0.3
            123.0           0.3
            204.0           0.3
            336.0           0.3
            554.0           0.3
            913.0           0.3
        SoilOrganicMatter: RootCn=45; RootWt=500; SoilCn=14.5; EnrACoeff=7.4; EnrBCoeff=0.2
          Layer:
            Thickness (mm)  OC (Total %)  FBiom (0-1)  FInert (0-1)
            45.0            4.2           0.04         0.4
            46.0            2.67          0.0357143    0.4
            75.0            2.08          0.0314286    0.410667
            123.0           1.95          0.0271429    0.492667
            204.0           1.01          0.0228571    0.628667
            336.0           1.07          0.0185714    0.890833
            554.0           0.25          0.0142857    0.95
            913.0           0.51          0.01         0.95
        Analysis
          Layer:
            Thickness (mm)  PH (1:5 water)
            45.0            5.75365
            46.0            5.74733
            75.0            5.71234
            123.0           5.71234
            204.0           5.74358
            336.0           6.13089
            554.0           6.78861
            913.0           6.78861
        Sample Initial nitrogen
          Layer:
            Thickness (mm)  NO3 (ppm)  NH4 (ppm)
            45.0            4.2        .1
            46.0            2.67       .1
            75.0            2.08       .1
            123.0           1.95       .1
            204.0           1.01       .1
            336.0           1.07       .1
            554.0           0.25       .1
            913.0           0.51       .1
          Date = 01/01/2005  # Sample date
        InitialWater: FractionFull=0.5; PercentMethod=EvenlyDistributed; RelativeTo=ll15
      surfaceom SurfaceOrganicMatter
        PoolName = OrganicMatter  # Organic Matter pool name
        type = Maize  # Organic Matter type
        mass = 500  # Initial surface residue (kg/ha)
        cnr = 80.0  # C:N ratio of initial residue
        standing_fraction = 0  # Fraction of residue standing
      fertiliser
      irrigation
        automatic_irrigation = off
        asw_depth = 600  # Depth to which ASW is calculated. (mm)
        crit_fr_asw = 0.75  # Fraction of ASW below which irrigation is applied (0-1.0)
        irrigation_efficiency = 1  # Efficiency of the irrigation. (0-1.0)
        irrigation_allocation = off  # Allocation limits
        allocation = 10  # Allocation in mm
        default_no3_conc = 0.0  # Nitrate concentration (ppm N)
        default_nh4_conc = 0.0  # Ammonium concentration (ppm N)
        default_cl_conc = 0.0  # Chloride concentration (ppm Cl)
      Maize
        ini: filename=Maize.xml
      folder Manager folder
        operations
        manager Reset
          # When should a reset be done
          reset_date = 1-jan  # Enter date of reset (dd-mmm)
          # Reset details
          soilmodule = Soil  # Name of your soil module
          surfaceommodule = SurfaceOrganicMatter  # Name of your surface organic matter module
          resetWater = no  # Reset soil water?
          resetNitrogen = no  # Reset soil nitrogen?
          resetSurfaceOM = no  # Reset surface organic matter?
          on start_of_day:
```
         if (today = date('[reset_date]')) then
            resetWater = '[resetWater]'
            resetNitrogen  = '[resetNitrogen]'
            resetSurfaceOM = '[resetSurfaceOM]'
            if (resetWater = 'yes') then
                '[soilmodule] Water' reset
            endif
            if (resetNitrogen = 'yes') then
                '[soilmodule] Nitrogen' reset
            endif
            if (resetSurfaceOM = 'yes') then
                '[surfaceommodule]' reset
            endif
            act_mods reseting
         endif
```
        manager Sow on a fixed date
          # Sowing criteria
          date = 1-may  # Enter sowing date (dd-mmm)
          # Sowing parameters
          crop = Maize  # Enter name of crop to sow
          density = 9  # Enter sowing density (plants/m2)
          depth = 30  # Enter sowing depth (mm)
          cultivar = B_105_biochar  # Enter cultivar
          class = plant  # Enter crop growth class
          row_spacing = 700  # Enter row spacing (mm)
          on start_of_day:
```
        if (today = date('[date]') then
              planting_date=dd_mmm_yyyy
              [crop] sow plants =[density], sowing_depth = [depth], cultivar = [cultivar], row_spacing = [row_spacing], crop_class = [class]
         endif
```
        manager Fertilise N at sowing
          # When should fertiliser be applied
          modulename = Maize  # On which module should the event come from
          eventname = sowing  # On which event should fertiliser be applied
          # Fertiliser application details
          fertmodule = fertiliser  # Module used to apply the fertiliser
          fert_depth = 40
          fert_amount_sow = 100  # Amount of starter fertiliser at sowing (kg/ha)
          fert_type_sow = NH4NO3  # Sowing fertiliser type
          on [modulename].[eventname]:
```
        [fertmodule] apply amount = [fert_amount_sow] (kg/ha), depth = [fert_depth] (mm), type = [fert_type_sow]
```
        manager Fertilise on DAS
          # When should fertiliser be applied
          modulename = Maize  # On which crop is fertiliser being applied
          fert_das = 45  # Enter fertiliser days after sowing
          fert_criteria = 100  # Amount of N required in top 3 layers (kg/ha)
          # Fertiliser application details
          fertmodule = fertiliser  # Module used to apply the fertiliser
          fert_depth = 40
          fert_type = NH4NO3  # Fertiliser type
          on start_of_day:
```
         if ([modulename].DaysAfterSowing = [fert_das]) then
            '[fertmodule]' apply amount = [fert_criteria] (kg/ha), depth = [fert_depth] (mm), type = [fert_type] ()
         endif
```
        manager Harvesting rule
          # Harvesting criteria
          crop = Maize  # Enter name of crop to harvest when ripe
          on end_of_day:
```
if [crop].StageName = 'harvest_ripe'  or [crop].plant_status = 'dead' then
   [crop] harvest
   [crop] end_crop
endif
```
        manager End crop on a fixed date
          # Harvesting criteria
          crop = Maize  # Enter name of crop to harvest when ripe
          date = 1-nov  # Enter ending date (dd-mmm)
          on end_of_day:
```
        if (today = date('[date]') then
              [crop]  end_crop
        endif
```
  simulation Generic
    clock
      start_date = 01/01/2005  # Enter the start date of the simulation
      end_date = 31/12/2018  # Enter the end date of the simulation
    metfile met: filename=met00000.met
    summaryfile
    manager2 Script(C#): same as Generic.Script(C#)
    area paddock
      soil: Site=?; Longitude=?
        Comment = ICASA Classification: Unknown  # Comments
        Latitude = ?  # Latitude (WGS84)
        DataSource = GSDE
        Water
          Layer:
            Thickness (mm)  BD (g/cc)  AirDry (mm/mm)  LL15 (mm/mm)  DUL (mm/mm)  SAT (mm/mm)
            45.0            1.28662    0.0904395       0.19          0.34         0.44
            46.0            1.38962    0.0907455       0.19          0.34         0.45
            75.0            1.39092    0.092608        0.22          0.35         0.48
            123.0           1.39092    0.092608        0.19          0.34         0.45
            204.0           1.46322    0.0963625       0.19          0.38         0.42
            336.0           1.53029    0.09582         0.23          0.35         0.44
            554.0           1.57829    0.082258        0.17          0.35         0.43
            913.0           1.57829    0.082258        0.17          0.35         0.43
          SoilCrop Maize
            Layer:
              Thickness (mm)  LL (mm/mm)  KL (/day)  XF (0-1)
              45.0            0.19        0.08       1
              46.0            0.19        0.08       1
              75.0            0.22        0.08       1
              123.0           0.19        0.08       1
              204.0           0.19        0.08       1
              336.0           0.23        0.0647333  1
              554.0           0.17        0.0478     1
              913.0           0.17        0.02       1
        SoilWat: same as Generic.paddock.Soil.SoilWat
        SoilOrganicMatter: RootCn=45; RootWt=500; SoilCn=14.5; EnrACoeff=7.4; EnrBCoeff=0.2
          Layer:
            Thickness (mm)  OC (Total %)  FBiom (0-1)  FInert (0-1)
            45.0            3.95          0.04         0.4
            46.0            2.45          0.0357143    0.4
            75.0            1.95          0.0314286    0.410667
            123.0           1.74          0.0271429    0.492667
            204.0           0.94          0.0228571    0.628667
            336.0           0.76          0.0185714    0.890833
            554.0           0.32          0.0142857    0.95
            913.0           0.57          0.01         0.95
        Analysis: same as Generic.paddock.Soil.Analysis
        Sample Initial nitrogen
          Layer:
            Thickness (mm)  NO3 (ppm)  NH4 (ppm)
            45.0            3.95       .1
            46.0            2.45       .1
            75.0            1.95       .1
            123.0           1.74       .1
            204.0           0.94       .1
            336.0           0.76       .1
            554.0           0.32       .1
            913.0           0.57       .1
          Date = 01/01/2005  # Sample date
        InitialWater: FractionFull=0.5; PercentMethod=EvenlyDistributed; RelativeTo=ll15
      surfaceom SurfaceOrganicMatter
        PoolName = OrganicMatter  # Organic Matter pool name
        type = Maize  # Organic Matter type
        mass = 500  # Initial surface residue (kg/ha)
        cnr = 80.0  # C:N ratio of initial residue
        standing_fraction = 0  # Fraction of residue standing
      fertiliser
      irrigation: same as Generic.paddock.Irrigation
      Maize
        ini: filename=Maize.xml
      folder Manager folder: same as Generic.paddock.Manager folder
  simulation Generic
    clock
      start_date = 01/01/2005  # Enter the start date of the simulation
      end_date = 31/12/2018  # Enter the end date of the simulation
    metfile met: filename=met00006.met
    summaryfile
    manager2 Script(C#): same as Generic.Script(C#)
    area paddock
      soil: Site=?; Longitude=?
        Comment = ICASA Classification: Unknown  # Comments
        Latitude = ?  # Latitude (WGS84)
        DataSource = GSDE
        Water
          Layer:
            Thickness (mm)  BD (g/cc)  AirDry (mm/mm)  LL15 (mm/mm)  DUL (mm/mm)  SAT (mm/mm)
            45.0            1.28662    0.0904395       0.18          0.33         0.43
            46.0            1.38962    0.0907455       0.16          0.37         0.44
            75.0            1.39092    0.092608        0.18          0.37         0.43
            123.0           1.39092    0.092608        0.2           0.34         0.39
            204.0           1.46322    0.0963625       0.17          0.39         0.43
            336.0           1.53029    0.09582         0.17          0.41         0.48
            554.0           1.57829    0.082258        0.17          0.32         0.43
            913.0           1.57829    0.082258        0.17          0.33         0.45
          SoilCrop Maize
            Layer:
              Thickness (mm)  LL (mm/mm)  KL (/day)  XF (0-1)
              45.0            0.18        0.08       1
              46.0            0.16        0.08       1
              75.0            0.18        0.08       1
              123.0           0.2         0.08       1
              204.0           0.17        0.08       1
              336.0           0.17        0.0647333  1
              554.0           0.17        0.0478     1
              913.0           0.17        0.02       1
        SoilWat: same as Generic.paddock.Soil.SoilWat
        SoilOrganicMatter: RootCn=45; RootWt=500; SoilCn=14.5; EnrACoeff=7.4; EnrBCoeff=0.2
          Layer:
            Thickness (mm)  OC (Total %)  FBiom (0-1)  FInert (0-1)
            45.0            3.88          0.04         0.4
            46.0            2.78          0.0357143    0.4
            75.0            1.69          0.0314286    0.410667
            123.0           1.93          0.0271429    0.492667
            204.0           1.0           0.0228571    0.628667
            336.0           0.59          0.0185714    0.890833
            554.0           0.59          0.0142857    0.95
            913.0           0.84          0.01         0.95
        Analysis: same as Generic.paddock.Soil.Analysis
        Sample Initial nitrogen
          Layer:
            Thickness (mm)  NO3 (ppm)  NH4 (ppm)
            45.0            3.88       .1
            46.0            2.78       .1
            75.0            1.69       .1
            123.0           1.93       .1
            204.0           1.0        .1
            336.0           0.59       .1
            554.0           0.59       .1
            913.0           0.84       .1
          Date = 01/01/2005  # Sample date
        InitialWater: FractionFull=0.5; PercentMethod=EvenlyDistributed; RelativeTo=ll15
      surfaceom SurfaceOrganicMatter
        PoolName = OrganicMatter  # Organic Matter pool name
        type = Maize  # Organic Matter type
        mass = 500  # Initial surface residue (kg/ha)
        cnr = 80.0  # C:N ratio of initial residue
        standing_fraction = 0  # Fraction of residue standing
      fertiliser
      irrigation: same as Generic.paddock.Irrigation
      Maize
        ini: filename=Maize.xml
      folder Manager folder: same as Generic.paddock.Manager folder
  simulation Generic
    clock
      start_date = 01/01/2005  # Enter the start date of the simulation
      end_date = 31/12/2018  # Enter the end date of the simulation
    metfile met: filename=met00007.met
    summaryfile
    manager2 Script(C#): same as Generic.Script(C#)
    area paddock
      soil: Site=?; Longitude=?
        Comment = ICASA Classification: Unknown  # Comments
        Latitude = ?  # Latitude (WGS84)
        DataSource = GSDE
        Water
          Layer:
            Thickness (mm)  BD (g/cc)  AirDry (mm/mm)  LL15 (mm/mm)  DUL (mm/mm)  SAT (mm/mm)
            45.0            1.28662    0.0904395       0.19          0.35         0.45
            46.0            1.38962    0.0907455       0.13          0.32         0.42
            75.0            1.39092    0.092608        0.16          0.38         0.44
            123.0           1.39092    0.092608        0.19          0.36         0.46
            204.0           1.46322    0.0963625       0.19          0.34         0.43
            336.0           1.53029    0.09582         0.2           0.36         0.46
            554.0           1.57829    0.082258        0.22          0.33         0.44
            913.0           1.57829    0.082258        0.14          0.35         0.46
          SoilCrop Maize
            Layer:
              Thickness (mm)  LL (mm/mm)  KL (/day)  XF (0-1)
              45.0            0.19        0.08       1
              46.0            0.13        0.08       1
              75.0            0.16        0.08       1
              123.0           0.19        0.08       1
              204.0           0.19        0.08       1
              336.0           0.2         0.0647333  1
              554.0           0.22        0.0478     1
              913.0           0.14        0.02       1
        SoilWat: same as Generic.paddock.Soil.SoilWat
        SoilOrganicMatter: RootCn=45; RootWt=500; SoilCn=14.5; EnrACoeff=7.4; EnrBCoeff=0.2
          Layer:
            Thickness (mm)  OC (Total %)  FBiom (0-1)  FInert (0-1)
            45.0            4.25          0.04         0.4
            46.0            2.27          0.0357143    0.4
            75.0            1.65          0.0314286    0.410667
            123.0           1.71          0.0271429    0.492667
            204.0           1.26          0.0228571    0.628667
            336.0           0.56          0.0185714    0.890833
            554.0           0.24          0.0142857    0.95
            913.0           0.31          0.01         0.95
        Analysis: same as Generic.paddock.Soil.Analysis
        Sample Initial nitrogen
          Layer:
            Thickness (mm)  NO3 (ppm)  NH4 (ppm)
            45.0            4.25       .1
            46.0            2.27       .1
            75.0            1.65       .1
            123.0           1.71       .1
            204.0           1.26       .1
            336.0           0.56       .1
            554.0           0.24       .1
            913.0           0.31       .1
          Date = 01/01/2005  # Sample date
        InitialWater: FractionFull=0.5; PercentMethod=EvenlyDistributed; RelativeTo=ll15
      surfaceom SurfaceOrganicMatter
        PoolName = OrganicMatter  # Organic Matter pool name
        type = Maize  # Organic Matter type
        mass = 500  # Initial surface residue (kg/ha)
        cnr = 80.0  # C:N ratio of initial residue
        standing_fraction = 0  # Fraction of residue standing
      fertiliser
      irrigation: same as Generic.paddock.Irrigation
      Maize
        ini: filename=Maize.xml
      folder Manager folder: same as Generic.paddock.Manager folder
  simulation Generic
    clock
      start_date = 01/01/2005  # Enter the start date of the simulation
      end_date = 31/12/2018  # Enter the end date of the simulation
    metfile met: filename=met00004.met
    summaryfile
    manager2 Script(C#): same as Generic.Script(C#)
    area paddock
      soil: Site=?; Longitude=?
        Comment = ICASA Classification: Unknown  # Comments
        Latitude = ?  # Latitude (WGS84)
        DataSource = GSDE
        Water
          Layer:
            Thickness (mm)  BD (g/cc)  AirDry (mm/mm)  LL15 (mm/mm)  DUL (mm/mm)  SAT (mm/mm)
            45.0            1.38624    0.0890895       0.19          0.33         0.43
            46.0            1.39148    0.0893225       0.17          0.31         0.41
            75.0            1.40334    0.089595        0.16          0.32         0.42
            123.0           1.44354    0.0902915       0.15          0.31         0.43
            204.0           1.53005    0.090169        0.17          0.28         0.38
            336.0           1.64745    0.0886          0.19          0.3          0.37
            554.0           1.71463    0.080343        0.16          0.28         0.37
            913.0           1.73546    0.070428        0.14          0.29         0.3
          SoilCrop Maize
            Layer:
              Thickness (mm)  LL (mm/mm)  KL (/day)  XF (0-1)
              45.0            0.19        0.08       1
              46.0            0.17        0.08       1
              75.0            0.16        0.08       1
              123.0           0.15        0.08       1
              204.0           0.17        0.08       1
              336.0           0.19        0.0647333  1
              554.0           0.16        0.0478     1
              913.0           0.14        0.02       1
        SoilWat: same as Generic.paddock.Soil.SoilWat
        SoilOrganicMatter: RootCn=45; RootWt=500; SoilCn=14.5; EnrACoeff=7.4; EnrBCoeff=0.2
          Layer:
            Thickness (mm)  OC (Total %)  FBiom (0-1)  FInert (0-1)
            45.0            2.95          0.04         0.4
            46.0            2.61          0.0357143    0.4
            75.0            2.51          0.0314286    0.410667
            123.0           2.19          0.0271429    0.492667
            204.0           1.51          0.0228571    0.628667
            336.0           0.05          0.0185714    0.890833
            554.0           0.44          0.0142857    0.95
            913.0           0.45          0.01         0.95
        Analysis
          Layer:
            Thickness (mm)  PH (1:5 water)
            45.0            6.55948
            46.0            6.55948
            75.0            6.54435
            123.0           6.51603
            204.0           6.48874
            336.0           6.62074
            554.0           7.17378
            913.0           7.57665
        Sample Initial nitrogen
          Layer:
            Thickness (mm)  NO3 (ppm)  NH4 (ppm)
            45.0            2.95       .1
            46.0            2.61       .1
            75.0            2.51       .1
            123.0           2.19       .1
            204.0           1.51       .1
            336.0           0.05       .1
            554.0           0.44       .1
            913.0           0.45       .1
          Date = 01/01/2005  # Sample date
        InitialWater: FractionFull=0.5; PercentMethod=EvenlyDistributed; RelativeTo=ll15
      surfaceom SurfaceOrganicMatter
        PoolName = OrganicMatter  # Organic Matter pool name
        type = Maize  # Organic Matter type
        mass = 500  # Initial surface residue (kg/ha)
        cnr = 80.0  # C:N ratio of initial residue
        standing_fraction = 0  # Fraction of residue standing
      fertiliser
      irrigation: same as Generic.paddock.Irrigation
      Maize
        ini: filename=Maize.xml
      folder Manager folder: same as Generic.paddock.Manager folder
