folder simulations: version=32
  simulation Generic
    clock
      start_date = 01/01/2015  # Enter the start date of the simulation
      end_date = 31/12/2018  # Enter the end date of the simulation
    summaryfile
    area paddock
      metfile met: filename=met00003.met
      soil: Site=?; Longitude=?
        Comment = ICASA Classification: Unknown  # Comments
        Latitude = ?  # Latitude (WGS84)
        DataSource = GSDE
        Water
          Layer:
            Thickness (mm)  BD (g/cc)  AirDry (mm/mm)  LL15 (mm/mm)  DUL (mm/mm)  SAT (mm/mm)
            45.0            1.4727     0.04903735      0.0980747     0.196372     0.386292
            46.0            1.61763    0.0462578       0.0925156     0.190225     0.385151
            75.0            1.61747    0.04880655      0.0976131     0.196654     0.385806
            123.0           1.61747    0.04880655      0.0976131     0.196654     0.385806
            204.0           1.62824    0.0484732       0.0969464     0.195989     0.385459
            336.0           1.63327    0.04552775      0.0910555     0.181777     0.384825
            554.0           1.63796    0.0185323       0.0370646     0.0917466    0.397463
            913.0           1.63796    0.0185323       0.0370646     0.0917466    0.397463
          SoilCrop Maize
            Layer:
              Thickness (mm)  LL (mm/mm)  KL (/day)  XF (0-1)
              45.0            0.0980747   0.08       1
              46.0            0.0925156   0.08       1
              75.0            0.0976131   0.08       1
              123.0           0.0976131   0.08       1
              204.0           0.0969464   0.08       1
              336.0           0.0910555   0.0647333  1
              554.0           0.0370646   0.0478     1
              913.0           0.0370646   0.02       1
        SoilWat: SummerCona=3.5; SummerU=4.63347; SummerDate=1-Nov; WinterCona=3.5; WinterU=4.63347; WinterDate=1-Apr; DiffusConst=40; DiffusSlope=16; Salb=0.134163; Cn2Bare=68.1673; CnRed=20; CnCov=0.8
          Layer:
            Thickness (mm)  SWCON (0-1)
            45.0            0.3
            46.0            0.3
            75.0            0.3
            123.0           0.3
            204.0           0.3
            336.0           0.3
            554.0           0.3
            913.0           0.3
        SoilOrganicMatter: RootCn=45; RootWt=500; SoilCn=14.5; EnrACoeff=7.4; EnrBCoeff=0.2
          Layer:
            Thickness (mm)  OC (Total %)  FBiom (0-1)  FInert (0-1)
            45.0            3.0004        0.04         0.4
            46.0            1.41987       0.0357143    0.4
            75.0            1.4526        0.0314286    0.410667
            123.0           1.4526        0.0271429    0.492667
            204.0           0.885404      0.0228571    0.628667
            336.0           0.413697      0.0185714    0.890833
            554.0           0.19533       0.0142857    0.95
            913.0           0.19533       0.01         0.95
        Analysis
          Layer:
            Thickness (mm)  PH (1:5 water)
            45.0            6.27505
            46.0            6.26094
            75.0            6.19343
            123.0           6.19343
            204.0           6.13446
            336.0           6.04645
            554.0           6.34208
            913.0           6.34208
        Sample Initial nitrogen
          Layer:
            Thickness (mm)  NO3 (ppm)  NH4 (ppm)
            45.0            3.0004     .1
            46.0            1.41987    .1
            75.0            1.4526     .1
            123.0           1.4526     .1
            204.0           0.885404   .1
            336.0           0.413697   .1
            554.0           0.19533    .1
            913.0           0.19533    .1
          Date = 01/01/2015  # Sample date
        InitialWater: FractionFull=0.5; PercentMethod=EvenlyDistributed; RelativeTo=ll15
      surfaceom SurfaceOrganicMatter
        PoolName = OrganicMatter  # Organic Matter pool name
        type = Maize  # Organic Matter type
        mass = 2047.52  # Initial surface residue (kg/ha)
        cnr = 80.0  # C:N ratio of initial residue
        standing_fraction = 0  # Fraction of residue standing
      fertiliser
      Maize
        ini: filename=Maize.xml
      folder Manager folder
        operations
        manager Reset
          # When should a reset be done
          reset_date = 1-jan  # Enter date of reset (dd-mmm)
          # Reset details
          soilmodule = Soil  # Name of your soil module
          surfaceommodule = SurfaceOrganicMatter  # Name of your surface organic matter module
          resetWater = no  # Reset soil water?
          resetNitrogen = no  # Reset soil nitrogen?
          resetSurfaceOM = no  # Reset surface organic matter?
          on start_of_day:
```
         if (today = date('[reset_date]')) then
            resetWater = '[resetWater]'
            resetNitrogen  = '[resetNitrogen]'
            resetSurfaceOM = '[resetSurfaceOM]'
            if (resetWater = 'yes') then
                '[soilmodule] Water' reset
            endif
            if (resetNitrogen = 'yes') then
                '[soilmodule] Nitrogen' reset
            endif
            if (resetSurfaceOM = 'yes') then
                '[surfaceommodule]' reset
            endif
            act_mods reseting
         endif
```
        manager Sow on a fixed date
          # Sowing criteria
          date = 1-may  # Enter sowing date (dd-mmm)
          # Sowing parameters
          crop = Maize  # Enter name of crop to sow
          density = 9  # Enter sowing density (plants/m2)
          depth = 30  # Enter sowing depth (mm)
          cultivar = B_105_biochar  # Enter cultivar
          class = plant  # Enter crop growth class
          row_spacing = 700  # Enter row spacing (mm)
          on start_of_day:
```
        if (today = date('[date]') then
              planting_date=dd_mmm_yyyy
              [crop] sow plants =[density], sowing_depth = [depth], cultivar = [cultivar], row_spacing = [row_spacing], crop_class = [class]
         endif
```
        manager Fertilise N at sowing
          # When should fertiliser be applied
          modulename = Maize  # On which module should the event come from
          eventname = sowing  # On which event should fertiliser be applied
          # Fertiliser application details
          fertmodule = fertiliser  # Module used to apply the fertiliser
          fert_depth = 40
          fert_amount_sow = 100  # Amount of starter fertiliser at sowing (kg/ha)
          fert_type_sow = NH4NO3  # Sowing fertiliser type
          on [modulename].[eventname]:
```
        [fertmodule] apply amount = [fert_amount_sow] (kg/ha), depth = [fert_depth] (mm), type = [fert_type_sow]
```
        manager Harvesting rule
          # Harvesting criteria
          crop = Maize  # Enter name of crop to harvest when ripe
          on end_of_day:
```
if [crop].StageName = 'harvest_ripe'  or [crop].plant_status = 'dead' then
   [crop] harvest
   [crop] end_crop
endif
```
        manager End crop on a fixed date
          # Harvesting criteria
          crop = Maize  # Enter name of crop to harvest when ripe
          date = 1-nov  # Enter ending date (dd-mmm)
          on end_of_day:
```
        if (today = date('[date]') then
              [crop]  end_crop
        endif
```
      manager derived variables
        on start_of_day:
```
AET = es + ep
T_average = (maxt + mint) * 0.5
soil_co2 = dlt_biom_c_atm() + dlt_fom_c_atm() + dlt_hum_c_atm() + dlt_res_c_atm
```
      tracker
        variable:
          sum of irrigation on end_of_day from sowing to harvesting as IrrigationIn
          sum of ep on end_of_day from sowing to harvesting as WaterUse
          sum of AET on end_of_day from sowing to harvesting as actual_ET
          sum of fertiliser on end_of_day from sowing to harvesting as FertiliserIn
          sum of leach_no3 on end_of_day from sowing to harvesting as NO3_leaching
          sum of radn on end_of_day from sowing to harvesting as RadiationIn
          sum of n2o_atm() on end_of_day from sowing to harvesting as N2OemissionIn
          sum of n2o_atm() on end_of_day from reported to now as N2Oemission_year
          sum of soil_co2 on end_of_day from sowing to harvesting as CO2emissionIn
          sum of soil_co2 on end_of_day from reported to now as CO2emission_year
          average of T_average on end_of_day from sowing to harvesting as TempIn
          average of T_average on end_of_day from reported to now as Temp_year
          sum of rain on end_of_day from sowing to harvesting as RainIn
          sum of rain on end_of_day from reported to now as Rain_year
          sum of radn on end_of_day from reported to now as Radiation_year
          average of nfact_photo on end_of_day from sowing to harvesting as N_stress_photo
      outputfile: filename=Generic.out; title=AgMIP
        variables
          variables: dd/mm/yyyy as Date, planting_date, biomass, yield, lai_max, DaysAfterSowing, flowering_das, maturity_das, RainIn, Temp_year, TempIn, RadiationIn, IrrigationIn, WaterUse, actual_ET, N_uptake, FertiliserIn, NO3_leaching, N2Oemission_year, N2OemissionIn, CO2emission_year, CO2emissionIn
        events Reporting Frequency: event=harvesting
  simulation Generic
    clock
      start_date = 01/01/2015  # Enter the start date of the simulation
      end_date = 31/12/2018  # Enter the end date of the simulation
    summaryfile
    area paddock
      metfile met: filename=met00002.met
      soil: Site=?; Longitude=?
        Comment = ICASA Classification: Unknown  # Comments
        Latitude = ?  # Latitude (WGS84)
        DataSource = GSDE
        Water
          Layer:
            Thickness (mm)  BD (g/cc)  AirDry (mm/mm)  LL15 (mm/mm)  DUL (mm/mm)  SAT (mm/mm)
            45.0            1.47276    0.04770105      0.0954021     0.212352     0.399818
            46.0            1.48134    0.04770105      0.0954021     0.212352     0.396904
            75.0            1.47593    0.04770105      0.0954021     0.212352     0.398742
            123.0           1.49165    0.0480087       0.0960174     0.212352     0.393403
            204.0           1.52351    0.0430087       0.0860174     0.197648     0.382582
            336.0           1.58596    0.0376052       0.0752104     0.187033     0.361371
            554.0           1.64729    0.0299069       0.0598138     0.164394     0.340544
            913.0           1.67375    0.0247524       0.0495048     0.156031     0.331556
          SoilCrop Maize
            Layer:
              Thickness (mm)  LL (mm/mm)  KL (/day)  XF (0-1)
              45.0            0.0954021   0.08       1
              46.0            0.0954021   0.08       1
              75.0            0.0954021   0.08       1
              123.0           0.0960174   0.08       1
              204.0           0.0860174   0.08       1
              336.0           0.0752104   0.0647333  1
              554.0           0.0598138   0.0478     1
              913.0           0.0495048   0.02       1
        SoilWat: same as Generic.paddock.Soil.SoilWat
        SoilOrganicMatter: RootCn=45; RootWt=500; SoilCn=14.5; EnrACoeff=7.4; EnrBCoeff=0.2
          Layer:
            Thickness (mm)  OC (Total %)  FBiom (0-1)  FInert (0-1)
            45.0            1.54246       0.04         0.4
            46.0            1.53196       0.0357143    0.4
            75.0            1.47083       0.0314286    0.410667
            123.0           1.29837       0.0271429    0.492667
            204.0           0.858575      0.0228571    0.628667
            336.0           0.317233      0.0185714    0.890833
            554.0           0.113606      0.0142857    0.95
            913.0           0.230195      0.01         0.95
        Analysis
          Layer:
            Thickness (mm)  PH (1:5 water)
            45.0            6.27951
            46.0            6.27951
            75.0            6.25399
            123.0           6.25399
            204.0           6.21425
            336.0           6.21425
            554.0           6.35093
            913.0           6.48438
        Sample Initial nitrogen
          Layer:
            Thickness (mm)  NO3 (ppm)  NH4 (ppm)
            45.0            1.54246    .1
            46.0            1.53196    .1
            75.0            1.47083    .1
            123.0           1.29837    .1
            204.0           0.858575   .1
            336.0           0.317233   .1
            554.0           0.113606   .1
            913.0           0.230195   .1
          Date = 01/01/2015  # Sample date
        InitialWater: FractionFull=0.5; PercentMethod=EvenlyDistributed; RelativeTo=ll15
      surfaceom SurfaceOrganicMatter
        PoolName = OrganicMatter  # Organic Matter pool name
        type = Maize  # Organic Matter type
        mass = 2376.26  # Initial surface residue (kg/ha)
        cnr = 80.0  # C:N ratio of initial residue
        standing_fraction = 0  # Fraction of residue standing
      fertiliser
      Maize
        ini: filename=Maize.xml
      folder Manager folder: same as Generic.paddock.Manager folder
      manager derived variables
        on start_of_day:
        script: same as in Generic.paddock.derived variables
      tracker: same as Generic.paddock.tracker
      outputfile: same as Generic.paddock.outputfile
  simulation Generic
    clock
      start_date = 01/01/2015  # Enter the start date of the simulation
      end_date = 31/12/2018  # Enter the end date of the simulation
    summaryfile
    area paddock
      metfile met: filename=met00000.met
      soil: same as Generic.paddock.Soil
      surfaceom SurfaceOrganicMatter
        PoolName = OrganicMatter  # Organic Matter pool name
        type = Maize  # Organic Matter type
        mass = 1834.77  # Initial surface residue (kg/ha)
        cnr = 80.0  # C:N ratio of initial residue
        standing_fraction = 0  # Fraction of residue standing
      fertiliser
      Maize
        ini: filename=Maize.xml
      folder Manager folder: same as Generic.paddock.Manager folder
      manager derived variables
        on start_of_day:
        script: same as in Generic.paddock.derived variables
      tracker: same as Generic.paddock.tracker
      outputfile: same as Generic.paddock.outputfile
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